OpenVSP model (file version 5), 15 components.
Geometry view with OpenVSP parameter names; values to 6 digits, angles in degrees, lengths in the model's unit.
Overall bounding box: X_Min=-13.2477 X_Len=102.309 Y_Min=-60.6465 Y_Len=121.293 Z_Min=-17.6116 Z_Len=37.4116

Fuselage "FuselageGeom"
  location (X Y Z) 0 0 0, rotation 0 0 0
  bounding box size 85 8 10.0402
  Design: Length=85
  cross sections:
    n  XLocPercent  YLocPercent  ZLocPercent  shape
    0  0            0            0            ellipse Ellipse_Height=5.2 Ellipse_Width=8
    1  0.149412     0            0            as above
    2  0.254118     0            0.02459      ellipse Ellipse_Height=9.75 Ellipse_Width=8
    3  0.465882     0            0.0211765    as above
    4  0.570588     0            -0.0039      ellipse Ellipse_Height=5.2 Ellipse_Width=8
    5  1            0            0            ellipse Ellipse_Height=3.66939 Ellipse_Width=2.83163

Propeller "Front Propeller", child of "FuselageGeom"
  location (X Y Z) 0 0 0, rotation 0 0 0
  bounding box size 1.15794 23.342 23.342
  Design: Diameter=23.3 NumBlade=4 Beta34=20 UseBeta34Flag=1 Feather=0 Rotate=0 Precone=0 ReverseFlag=0 FoldAngle=0 PropMode=0 AF=151.538 CLi=0.538798 Chord=0.177656 Solidity=0.226199 ConstructXoC=0.5 FeatherAxisXoC=0.5 FeatherOffsetXoC=0
  cross sections:
    n  RadiusFrac  shape
    0  0.2         NACA 4-digit modified Camber=0 CamberLoc=0.2 Chord=0.932 IdealCl=0 LERadIndx=6 ThickChord=0.5 ThickLoc=0.3
    1  0.4         NACA 16-series Chord=1.93681 IdealCl=0.7 ThickChord=0.144074
    2  1           NACA 16-series Chord=1.5145 IdealCl=0.2 ThickChord=0.03
  Chord along r/R (cubic Bezier): 0.2: 0.08, 0.333333: 0.15, 0.466667: 0.2, 0.6: 0.2, 0.716667: 0.2, 0.833333: 0.2, 0.95: 0.2, 0.966667: 0.2, 0.983333: 0.2, 1: 0.13
  Twist along r/R (PCHIP): 0.2: 46.75, 0.75: 20, 1: 13
  Thick along r/R (cubic Bezier): 0.2: 0.5, 0.233333: 0.3, 0.266667: 0.225, 0.3: 0.2, 0.4: 0.125, 0.5: 0.115, 0.6: 0.1, 0.733333: 0.075, 0.866667: 0.055, 1: 0.03
  CLI along r/R (cubic Bezier): 0.2: 0, 0.266667: 0.7, 0.333333: 0.7, 0.4: 0.7, 0.466667: 0.7, 0.533333: 0.7, 0.6: 0.7, 0.733333: 0.7, 0.866667: 0.7, 1: 0.2

Cone "Cone", child of "Front Propeller"
  location (X Y Z) 0.515464 0 0, rotation 170 0 -180; relative location 0.515464 0 0, rotation -10 180 0
  bounding box size 13.7631 7.32202 7.32202
  mass: Density=1 Shell_Flag=0 Mass_Area=1 Mass_Prior=0
  Design: Diameter=6.3205 Height=13.7631
  custom script Cone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

Cone "Cone", child of "Front Propeller"
  location (X Y Z) 85 0 0, rotation 0 0 0
  bounding box size 4.06132 3.42938 3.42938
  Design: Diameter=3.42938 Height=4.06132
  custom script Cone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

Ellipsoid "EllipsoidGeom", child of "FuselageGeom"
  location (X Y Z) -0.869565 0 0, rotation 0 0 0
  bounding box size 2.6 8.1 5.4
  Design: A_Radius=1.3 B_Radius=4.05 C_Radius=2.7

Wing "WingGeom"
  location (X Y Z) 23.082 0 5.984, rotation 7 0 0
  symmetric about XZ
  bounding box size 16.6 121.293 9.08261
  totals: TotalSpan=122 TotalProjectedSpan=122 TotalChord=16.6 TotalArea=2025.2 TotalAR=7.3494 MAC=16.6
  root: chord 16.6, twist 0, NACA 4-series Camber=0 CamberLoc=0.2 ThickChord=0.1
  sections:
    n  Span  Root_Chord  Tip_Chord  Area    Sweep  Sweep_Location  Dihedral  Twist  Twist_Location  tip airfoil
    1  61    16.6        16.6       1012.6  0      0               0         0      0.25            as above

Wing "Horizontal wing"
  location (X Y Z) 75.8361 0 4.03318, rotation 0 0 0
  symmetric about XZ
  bounding box size 9 37 0.900522
  totals: TotalSpan=37 TotalProjectedSpan=37 TotalChord=9 TotalArea=333 TotalAR=4.11111 MAC=9
  root: chord 9, twist 0, NACA 4-series Camber=0 CamberLoc=0.2 ThickChord=0.1
  sections:
    n  Span  Root_Chord  Tip_Chord  Area   Sweep  Sweep_Location  Dihedral  Twist  Twist_Location  tip airfoil
    1  18.5  9           9          166.5  0      0               0         0      0.25            as above

Wing "Vertical Tail"
  location (X Y Z) 72.7377 0 1.8, rotation 90 0 0
  bounding box size 12.2897 1.22968 18
  totals: TotalSpan=18 TotalProjectedSpan=18 TotalChord=6.64484 TotalArea=119.607 TotalAR=2.70887 MAC=8.24328
  root: chord 12.2897, twist 0, NACA 4-series Camber=0 CamberLoc=0.2 ThickChord=0.1
  sections:
    n  Span  Root_Chord  Tip_Chord  Area     Sweep  Sweep_Location  Dihedral  Twist  Twist_Location  tip airfoil
    1  18    12.2897     1          119.607  30     0               0         0      0.25            as above

BodyOfRevolution "BORGeom"
  location (X Y Z) 6.08696 0.5 -16, rotation 90 90 0
  bounding box size 3.22313 0.95 3.22313
  Design: A0=4.05825 Ae=4.05825 Amin=1.37498 AminW=0.75 Angle=180 Diameter=2.27313 Mode=0
  profile: circle Circle_Diameter=0.95

Pod "PodGeom", child of "BORGeom"
  location (X Y Z) 6.19565 0 -2.28261, rotation 0 90 0
  bounding box size 1.5 1.5 15
  Design: FineRatio=20 Length=15

Pod "PodGeom", child of "PodGeom"
  location (X Y Z) 35 -1.957 -2.28261, rotation -30 90 0; relative location 35 -1.957 -2.28261, rotation 0 90 -30
  bounding box size 1.60976 8.89409 13.7953
  Design: FineRatio=18.6364 Length=15

Pod "PodGeom", child of "PodGeom"
  location (X Y Z) 34.8913 1.95652 -2.28261, rotation 30 90 0; relative location 34.8913 1.95652 -2.28261, rotation 0 90 30
  bounding box size 1.53488 8.82925 13.7578
  Design: FineRatio=19.5455 Length=15

BodyOfRevolution "BORGeom", child of "BORGeom"
  location (X Y Z) 35.1087 -9.17391 -15, rotation 90 90 0
  bounding box size 3.65841 0.95 3.65841
  Design: A0=5.76128 Ae=5.76128 Amin=2.42846 AminW=0.75 Angle=180 Diameter=2.70841 Mode=0
  profile: circle Circle_Diameter=0.95

BodyOfRevolution "BORGeom", child of "BORGeom"
  location (X Y Z) 34.4 8.78696 -14.7826, rotation 90 80.2174 175.109
  bounding box size 4.01249 1.91091 3.91884
  Design: A0=6.61372 Ae=6.61372 Amin=2.9922 AminW=0.75 Angle=180 Diameter=2.90187 Mode=0
  profile: circle Circle_Diameter=0.95

Wing "top wing"
  location (X Y Z) 32.459 30.9016 11.3934, rotation 7.95082 11.9672 20
  symmetric about XZ
  bounding box size 12.697 92.3693 4.46664
  totals: TotalSpan=26 TotalProjectedSpan=26 TotalChord=3.61111 TotalArea=93.8889 TotalAR=7.2 MAC=4.04444
  root: chord 5.77778, twist 0, NACA 4-series Camber=0 CamberLoc=0.2 ThickChord=0.1
  sections:
    n  Span  Root_Chord  Tip_Chord  Area     Sweep  Sweep_Location  Dihedral  Twist  Twist_Location  tip airfoil
    1  13    5.77778     1.44444    46.9444  30     0               0         0      0.25            as above
  SS_Control "SS_CONT_0": EtaStart=0.6 EtaEnd=0.95 Length_C_Start=0.25 Length_C_End=0.25 Length_Start=0.794444 Length_End=0.415278 LE_Flag=0 Surf_Type=2
